*HEADING
Cantilever beam 100x10x5 mm, C3D20, tip load -1000 N, linear static
** Units: mm, N, MPa, tonne/mm^3
*NODE, NSET=NALL
1, 0.000000, -5.000000, -2.500000
2, 3.125000, -5.000000, -2.500000
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*ELEMENT, TYPE=C3D20, ELSET=EALL
1, 1, 3, 69, 67, 595, 597, 663, 661, 2, 36, 68, 34, 596, 630, 662
628, 298, 300, 366, 364
2, 3, 5, 71, 69, 597, 599, 665, 663, 4, 38, 70, 36, 598, 632, 664
630, 300, 302, 368, 366
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*NSET, NSET=NROOT
1, 34, 67, 100, 133, 166
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*NSET, NSET=NTIP
33, 66, 99, 132, 165, 198
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** Steel, units mm/N/MPa/tonne per mm^3
*MATERIAL, NAME=STEEL
*ELASTIC
210000.0, 0.3
*DENSITY
7.850e-09
*SOLID SECTION, ELSET=EALL, MATERIAL=STEEL
** Fully clamp the root face x=0 (all DOF)
*BOUNDARY
NROOT, 1, 6, 0.0
*STEP
*STATIC
** Total tip force -1000.0 N in y, equally distributed over 45 NTIP nodes
*CLOAD
33, 2, -22.222222
66, 2, -22.222222
99, 2, -22.222222
132, 2, -22.222222
165, 2, -22.222222
198, 2, -22.222222
231, 2, -22.222222
264, 2, -22.222222
297, 2, -22.222222
330, 2, -22.222222
363, 2, -22.222222
396, 2, -22.222222
429, 2, -22.222222
462, 2, -22.222222
495, 2, -22.222222
528, 2, -22.222222
561, 2, -22.222222
594, 2, -22.222222
627, 2, -22.222222
660, 2, -22.222222
693, 2, -22.222222
726, 2, -22.222222
759, 2, -22.222222
792, 2, -22.222222
825, 2, -22.222222
858, 2, -22.222222
891, 2, -22.222222
924, 2, -22.222222
957, 2, -22.222222
990, 2, -22.222222
1023, 2, -22.222222
1056, 2, -22.222222
1089, 2, -22.222222
1122, 2, -22.222222
1155, 2, -22.222222
1188, 2, -22.222222
1221, 2, -22.222222
1254, 2, -22.222222
1287, 2, -22.222222
1320, 2, -22.222222
1353, 2, -22.222222
1386, 2, -22.222222
1419, 2, -22.222222
1452, 2, -22.222222
1485, 2, -22.222232
*NODE PRINT, NSET=NTIP
U
*NODE PRINT, NSET=NROOT
RF
*END STEP
