*HEADING
Cantilever beam static deflection
**
*NODE
1, 0.0000, -5.0000, -2.5000
2, 0.0000, -5.0000, -1.2500
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*ELEMENT, TYPE=C3D20, ELSET=EALL
1, 1, 91, 101, 11, 3, 93, 103, 13, 46, 96, 56, 6, 48, 98, 58
8, 2, 92, 102, 12
2, 3, 93, 103, 13, 5, 95, 105, 15, 48, 98, 58, 8, 50, 100, 60
10, 4, 94, 104, 14
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*MATERIAL, NAME=STEEL
*ELASTIC
210000.0, 0.3
*DENSITY
7.850e-09
*SOLID SECTION, ELSET=EALL, MATERIAL=STEEL
*NSET, NSET=NROOT
1, 2, 3, 4, 5, 6
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*NSET, NSET=NTIP
1441, 1442, 1443, 1444, 1445, 1446
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*STEP, NAME=LOAD
*STATIC
**
*BOUNDARY
NROOT, 1, 6, 0.0
*CLOAD
NTIP, 2, -22.2222222222
*NODE PRINT, NSET=NTIP
U
*NODE PRINT, NSET=NROOT
RF
**
*END STEP
